// SBML level 2 version 4

model ra_immune_network()

  // Compartments:
  compartment c = 1;

  // Species:
  substanceOnly species BAFF in c = 0.9;
  substanceOnly species IFNg in c = 0.142;
  substanceOnly species IL10 in c = 1.40816;
  substanceOnly species IL12 in c = 0.012;
  substanceOnly species IL17 in c = 0.00702;
  substanceOnly species IL1b in c = 1.208;
  substanceOnly species IL23 in c = 0.02;
  substanceOnly species IL6 in c = 289;
  substanceOnly species MCP1 in c = 25;
  substanceOnly species MIP3 in c = 3;
  substanceOnly species RANTES in c = 0.145;
  substanceOnly species TGFb in c = 35;
  substanceOnly species TNFa in c = 0.904;
  substanceOnly species VEGF in c = 118;
  substanceOnly species BCells in c = 14200000;
  substanceOnly species CTL in c = 1310000;
  substanceOnly species Endothelial in c = 62100000;
  substanceOnly species FLS in c = 22800000;
  substanceOnly species Macrophages in c = 49400000;
  substanceOnly species PlasmaCells in c = 31900000;
  substanceOnly species Th1 in c = 40321000;
  substanceOnly species Th17 in c = 1447590;
  substanceOnly species Treg in c = 7902916;

  // Parameters:
  kcl_BAFF = 6.2;
  ksec_BAFF = 5.58;
  kcl_IFNg = 3.696785;
  ksec_IFNg = 0.1908885;
  Msec_IFNg_Macrophages_IL12 = 1.5;
  Ksec_IFNg_IL12 = 0.012;
  Msec_IFNg_Th1_IL10 = 0.65;
  Ksec_IFNg_IL10 = 1.40816;
  Msec_IFNg_CTL_IL6 = 0.5;
  Ksec_IFNg_IL6 = 289;
  Msec_IFNg_CTL_TGFb = 0.8;
  Ksec_IFNg_TGFb = 35;
  kcl_IL10 = 4.620981;
  ksec_IL10 = 6.507081;
  kcl_IL12 = 0.5545177;
  ksec_IL12 = 0.006654213;
  kcl_IL17 = 2.079442;
  ksec_IL17 = 0.004298703;
  Msec_IL17_Th17_IL1b = 1.5;
  Ksec_IL17_IL1b = 1.208;
  Msec_IL17_Th17_IL6 = 1.5;
  Ksec_IL17_IL6 = 289;
  Msec_IL17_Th17_IL23 = 1;
  Ksec_IL17_IL23 = 0.02;
  Msec_IL17_CTL_IL23 = 2.666667;
  kcl_IL1b = 4.753009;
  ksec_IL1b = 2.88157;
  Msec_IL1b_FLS_IL10 = 0.4850746;
  Ksec_IL1b_IL10 = 1.40816;
  Msec_IL1b_Macrophages_IL17 = 1.5;
  Ksec_IL1b_IL17 = 0.00702;
  kcl_IL23 = 0.5545177;
  ksec_IL23 = 0.01109035;
  kcl_IL6 = 5.545177;
  ksec_IL6 = 20.32886;
  Msec_IL6_FLS_IL1b = 69;
  Ksec_IL6_IL1b = 1.208;
  Msec_IL6_FLS_IL17 = 4.269231;
  Ksec_IL6_IL17 = 0.00702;
  Msec_IL6_FLS_IFNg = 1.083333;
  Ksec_IL6_IFNg = 0.142;
  Msec_IL6_FLS_RANTES = 0.6;
  Ksec_IL6_RANTES = 0.145;
  Msec_IL6_Macrophages_TNFa = 2.5;
  Ksec_IL6_TNFa = 0.904;
  Msec_IL6_Macrophages_IL1b = 1.5;
  Msec_IL6_Macrophages_IL10 = 0.8181818;
  Ksec_IL6_IL10 = 1.40816;
  kcl_MCP1 = 8.3;
  ksec_MCP1 = 0.04259952;
  Msec_MCP1_FLS_IL1b = 120;
  Ksec_MCP1_IL1b = 1.208;
  Msec_MCP1_FLS_TNFa = 160;
  Ksec_MCP1_TNFa = 0.904;
  Msec_MCP1_Macrophages_IL1b = 0.3947368;
  kcl_MIP3 = 33;
  ksec_MIP3 = 0.75;
  Msec_MIP3_FLS_TNFa = 10;
  Ksec_MIP3_TNFa = 0.904;
  Msec_MIP3_FLS_IL1b = 15;
  Ksec_MIP3_IL1b = 1.208;
  Msec_MIP3_FLS_IL17 = 5;
  Ksec_MIP3_IL17 = 0.00702;
  kcl_RANTES = 33;
  ksec_RANTES = 0.3544444;
  Msec_RANTES_FLS_TNFa = 2;
  Ksec_RANTES_TNFa = 0.904;
  Msec_RANTES_FLS_IL1b = 1;
  Ksec_RANTES_IL1b = 1.208;
  Msec_RANTES_Endothelial_TNFa = 11;
  Msec_RANTES_Endothelial_IL1b = 3;
  kcl_TGFb = 332.7106;
  ksec_TGFb = 11644.87;
  kcl_TNFa = 54.84241;
  ksec_TNFa = 25.15107;
  Msec_TNFa_FLS_IL10 = 0.74;
  Ksec_TNFa_IL10 = 1.40816;
  Msec_TNFa_Macrophages_IL17 = 1.5;
  Ksec_TNFa_IL17 = 0.00702;
  Msec_TNFa_Macrophages_IL10 = 0.7619048;
  kcl_VEGF = 29;
  ksec_VEGF = 164.6365;
  Msec_VEGF_FLS_IL1b = 1.5;
  Ksec_VEGF_IL1b = 1.208;
  Msec_VEGF_FLS_IL6 = 0.3541667;
  Ksec_VEGF_IL6 = 289;
  Msec_VEGF_FLS_TNFa = 1.5;
  Ksec_VEGF_TNFa = 0.904;
  Msec_VEGF_FLS_IL17 = 1.291139;
  Ksec_VEGF_IL17 = 0.00702;
  Msec_VEGF_FLS_TGFb = 30;
  Ksec_VEGF_TGFb = 35;
  Msec_VEGF_Endothelial_TGFb = 3;
  kIn_BCells_Baseline = 30000;
  M_BCells_prolif_IL6 = 2.6;
  K_BCells_IL6 = 289;
  M_BCells_prolif_IFNg = 1.5;
  K_BCells_IFNg = 0.142;
  M_BCells_prolif_IL10 = 19;
  K_BCells_IL10 = 1.40816;
  M_BCells_prolif_TGFb = 0.14;
  K_BCells_TGFb = 35;
  kd_BCells_Baseline = 0.1335314;
  M_BCells_apop_BAFF = 0.72;
  K_BCells_BAFF = 0.9;
  kprolif_BCells = 0.008789421;
  kIn_CTL_Baseline = 480000;
  M_CTL_influx_RANTES = 0.7391304;
  K_CTL_RANTES = 0.145;
  M_CTL_prolif_IL1b = 1;
  K_CTL_IL1b = 1.208;
  M_CTL_prolif_TGFb = 0.55;
  K_CTL_TGFb = 35;
  M_CTL_prolif_IL12 = 4.6;
  K_CTL_IL12 = 0.012;
  kd_CTL_Baseline = 0.818268663;
  M_CTL_apop_TGFb = 0.6;
  kprolif_CTL = 0.1548367;
  kIn_Endo_Baseline = 44736;
  M_Endothelial_influx_VEGF = 1.24;
  K_Endothelial_VEGF = 118;
  M_Endothelial_influx_TNFa = 2.5;
  K_Endothelial_TNFa = 0.904;
  M_Endothelial_influx_IL6 = 1.733333;
  K_Endothelial_IL6 = 289;
  M_Endothelial_influx_IL17 = 1.133333;
  K_Endothelial_IL17 = 0.00702;
  M_Endothelial_influx_TGFb = 0.2068966;
  K_Endothelial_TGFb = 35;
  M_Endothelial_prolif_VEGF = 2.75;
  M_Endothelial_prolif_IL1b = 0.21;
  K_Endothelial_IL1b = 1.208;
  kd_Endo_Baseline = 0.09241962;
  M_Endothelial_apop_TNFa = 1.666667;
  M_Endothelial_apop_VEGF = 0.6896552;
  kprolif_Endothelial = 0.09067793;
  M_FLS_prolif_TNFa = 1.5;
  K_FLS_TNFa = 0.904;
  M_FLS_prolif_IL6 = 2;
  K_FLS_IL6 = 289;
  M_FLS_prolif_IL1b = 1.4;
  K_FLS_IL1b = 1.208;
  M_FLS_prolif_IL17 = 1.057143;
  K_FLS_IL17 = 0.00702;
  M_FLS_prolif_TGFb = 1.857143;
  K_FLS_TGFb = 35;
  kd_FLS_Baseline = 0.1451414;
  kprolif_FLS = 0.04390079;
  M_Macrophages_prolif_TNFa = 1.5;
  K_Macrophages_TNFa = 0.904;
  kd_Macrophase_Baseline = 0.0618754;
  M_Macrophages_apop_TNFa = 1.5;
  kprolif_Macrophages = 0.0618754;
  kd_PlasmaCells_Baseline = 0.01368767;
  kprolif_PlasmaCells = 0.01368767;
  kIn_Th1_Baseline = 360000;
  M_Th1_prolif_IL12 = 1.5;
  K_Th1_IL12 = 0.012;
  M_Th1_prolif_TGFb = 0.65;
  K_Th1_TGFb = 35;
  kd_Th1_Baseline = 0.650075718;
  M_Th1_apop_IL12 = 0.2647059;
  kprolif_Th1 = 0.3899626;
  kIn_Th17_Baseline = 360000;
  M_Th17_prolif_IL1b = 7;
  K_Th17_IL1b = 1.208;
  M_Th17_prolif_IL6 = 2.5;
  K_Th17_IL6 = 289;
  M_Th17_prolif_IL23 = 1;
  K_Th17_IL23 = 0.02;
  kd_Th17_Baseline = 0.65;
  kprolif_Th17 = 0.05733011;
  kIn_Treg_Baseline = 360000;
  M_Treg_prolif_IL6 = 0.4444444;
  K_Treg_IL6 = 289;
  M_Treg_prolif_TGFb = 2.25;
  K_Treg_TGFb = 35;
  M_Treg_prolif_IFNg = 0.5;
  K_Treg_IFNg = 0.142;
  kd_Treg_Baseline = 0.65;
  kprolif_Treg = 0.6867092;

  // Reactions:
  BAFF_sec_const: => BAFF; ksec_BAFF;
  BAFF_clr: BAFF => ; kcl_BAFF*BAFF;
  IFNg_sec_Macrophages: => IFNg; ksec_IFNg*(Macrophages/49400000)*(1 + (Msec_IFNg_Macrophages_IL12 - 1)*IL12/(Ksec_IFNg_IL12 + IL12));
  IFNg_sec_Th1: => IFNg; ksec_IFNg*(Th1/40321000)*(1 + (Msec_IFNg_Th1_IL10 - 1)*IL10/(Ksec_IFNg_IL10 + IL10));
  IFNg_sec_CTL: => IFNg; ksec_IFNg*(CTL/1310000)*(1 + (Msec_IFNg_CTL_IL6 - 1)*IL6/(Ksec_IFNg_IL6 + IL6))*(1 + (Msec_IFNg_CTL_TGFb - 1)*TGFb/(Ksec_IFNg_TGFb + TGFb));
  IFNg_clr: IFNg => ; kcl_IFNg*IFNg;
  IL10_sec_const: => IL10; ksec_IL10;
  IL10_clr: IL10 => ; kcl_IL10*IL10;
  IL12_sec_const: => IL12; ksec_IL12;
  IL12_clr: IL12 => ; kcl_IL12*IL12;
  IL17_sec_Th17: => IL17; ksec_IL17*(Th17/1447590)*(1 + (Msec_IL17_Th17_IL1b - 1)*IL1b/(Ksec_IL17_IL1b + IL1b))*(1 + (Msec_IL17_Th17_IL6 - 1)*IL6/(Ksec_IL17_IL6 + IL6))*(1 + (Msec_IL17_Th17_IL23 - 1)*IL23/(Ksec_IL17_IL23 + IL23));
  IL17_sec_CTL: => IL17; ksec_IL17*(CTL/1310000)*(1 + (Msec_IL17_CTL_IL23 - 1)*IL23/(Ksec_IL17_IL23 + IL23));
  IL17_clr: IL17 => ; kcl_IL17*IL17;
  IL1b_sec_FLS: => IL1b; ksec_IL1b*(FLS/22800000)*(1 + (Msec_IL1b_FLS_IL10 - 1)*IL10/(Ksec_IL1b_IL10 + IL10));
  IL1b_sec_Macrophages: => IL1b; ksec_IL1b*(Macrophages/49400000)*(1 + (Msec_IL1b_Macrophages_IL17 - 1)*IL17/(Ksec_IL1b_IL17 + IL17));
  IL1b_clr: IL1b => ; kcl_IL1b*IL1b;
  IL23_sec_const: => IL23; ksec_IL23;
  IL23_clr: IL23 => ; kcl_IL23*IL23;
  IL6_sec_FLS: => IL6; ksec_IL6*(FLS/22800000)*(1 + (Msec_IL6_FLS_IL1b - 1)*IL1b/(Ksec_IL6_IL1b + IL1b))*(1 + (Msec_IL6_FLS_IL17 - 1)*IL17/(Ksec_IL6_IL17 + IL17))*(1 + (Msec_IL6_FLS_IFNg - 1)*IFNg/(Ksec_IL6_IFNg + IFNg))*(1 + (Msec_IL6_FLS_RANTES - 1)*RANTES/(Ksec_IL6_RANTES + RANTES));
  IL6_sec_Macrophages: => IL6; ksec_IL6*(Macrophages/49400000)*(1 + (Msec_IL6_Macrophages_TNFa - 1)*TNFa/(Ksec_IL6_TNFa + TNFa))*(1 + (Msec_IL6_Macrophages_IL1b - 1)*IL1b/(Ksec_IL6_IL1b + IL1b))*(1 + (Msec_IL6_Macrophages_IL10 - 1)*IL10/(Ksec_IL6_IL10 + IL10));
  IL6_clr: IL6 => ; kcl_IL6*IL6;
  MCP1_sec_FLS: => MCP1; ksec_MCP1*(FLS/22800000)*(1 + (Msec_MCP1_FLS_IL1b - 1)*IL1b/(Ksec_MCP1_IL1b + IL1b))*(1 + (Msec_MCP1_FLS_TNFa - 1)*TNFa/(Ksec_MCP1_TNFa + TNFa));
  MCP1_sec_Macrophages: => MCP1; ksec_MCP1*(Macrophages/49400000)*(1 + (Msec_MCP1_Macrophages_IL1b - 1)*IL1b/(Ksec_MCP1_IL1b + IL1b));
  MCP1_clr: MCP1 => ; kcl_MCP1*MCP1;
  MIP3_sec_FLS: => MIP3; ksec_MIP3*(FLS/22800000)*(1 + (Msec_MIP3_FLS_TNFa - 1)*TNFa/(Ksec_MIP3_TNFa + TNFa))*(1 + (Msec_MIP3_FLS_IL1b - 1)*IL1b/(Ksec_MIP3_IL1b + IL1b))*(1 + (Msec_MIP3_FLS_IL17 - 1)*IL17/(Ksec_MIP3_IL17 + IL17));
  MIP3_clr: MIP3 => ; kcl_MIP3*MIP3;
  RANTES_sec_FLS: => RANTES; ksec_RANTES*(FLS/22800000)*(1 + (Msec_RANTES_FLS_TNFa - 1)*TNFa/(Ksec_RANTES_TNFa + TNFa))*(1 + (Msec_RANTES_FLS_IL1b - 1)*IL1b/(Ksec_RANTES_IL1b + IL1b));
  RANTES_sec_Endothelial: => RANTES; ksec_RANTES*(Endothelial/62100000)*(1 + (Msec_RANTES_Endothelial_TNFa - 1)*TNFa/(Ksec_RANTES_TNFa + TNFa))*(1 + (Msec_RANTES_Endothelial_IL1b - 1)*IL1b/(Ksec_RANTES_IL1b + IL1b));
  RANTES_clr: RANTES => ; kcl_RANTES*RANTES;
  TGFb_sec_const: => TGFb; ksec_TGFb;
  TGFb_clr: TGFb => ; kcl_TGFb*TGFb;
  TNFa_sec_FLS: => TNFa; ksec_TNFa*(FLS/22800000)*(1 + (Msec_TNFa_FLS_IL10 - 1)*IL10/(Ksec_TNFa_IL10 + IL10));
  TNFa_sec_Macrophages: => TNFa; ksec_TNFa*(Macrophages/49400000)*(1 + (Msec_TNFa_Macrophages_IL17 - 1)*IL17/(Ksec_TNFa_IL17 + IL17))*(1 + (Msec_TNFa_Macrophages_IL10 - 1)*IL10/(Ksec_TNFa_IL10 + IL10));
  TNFa_clr: TNFa => ; kcl_TNFa*TNFa;
  VEGF_sec_FLS: => VEGF; ksec_VEGF*(FLS/22800000)*(1 + (Msec_VEGF_FLS_IL1b - 1)*IL1b/(Ksec_VEGF_IL1b + IL1b))*(1 + (Msec_VEGF_FLS_IL6 - 1)*IL6/(Ksec_VEGF_IL6 + IL6))*(1 + (Msec_VEGF_FLS_TNFa - 1)*TNFa/(Ksec_VEGF_TNFa + TNFa))*(1 + (Msec_VEGF_FLS_IL17 - 1)*IL17/(Ksec_VEGF_IL17 + IL17))*(1 + (Msec_VEGF_FLS_TGFb - 1)*TGFb/(Ksec_VEGF_TGFb + TGFb));
  VEGF_sec_Endothelial: => VEGF; ksec_VEGF*(Endothelial/62100000)*(1 + (Msec_VEGF_Endothelial_TGFb - 1)*TGFb/(Ksec_VEGF_TGFb + TGFb));
  VEGF_clr: VEGF => ; kcl_VEGF*VEGF;
  BCells_influx: => BCells; kIn_BCells_Baseline*1;
  BCells_prolif: => BCells; kprolif_BCells*BCells*(1 + (M_BCells_prolif_IL6 - 1)*IL6/(K_BCells_IL6 + IL6))*(1 + (M_BCells_prolif_IFNg - 1)*IFNg/(K_BCells_IFNg + IFNg))*(1 + (M_BCells_prolif_IL10 - 1)*IL10/(K_BCells_IL10 + IL10))*(1 + (M_BCells_prolif_TGFb - 1)*TGFb/(K_BCells_TGFb + TGFb));
  BCells_death: BCells => ; kd_BCells_Baseline*BCells*(1 + (M_BCells_apop_BAFF - 1)*BAFF/(K_BCells_BAFF + BAFF));
  CTL_influx: => CTL; kIn_CTL_Baseline*(1 + (M_CTL_influx_RANTES - 1)*RANTES/(K_CTL_RANTES + RANTES));
  CTL_prolif: => CTL; kprolif_CTL*CTL*(1 + (M_CTL_prolif_IL1b - 1)*IL1b/(K_CTL_IL1b + IL1b))*(1 + (M_CTL_prolif_TGFb - 1)*TGFb/(K_CTL_TGFb + TGFb))*(1 + (M_CTL_prolif_IL12 - 1)*IL12/(K_CTL_IL12 + IL12));
  CTL_death: CTL => ; kd_CTL_Baseline*CTL*(1 + (M_CTL_apop_TGFb - 1)*TGFb/(K_CTL_TGFb + TGFb));
  Endothelial_influx: => Endothelial; kIn_Endo_Baseline*(1 + (M_Endothelial_influx_VEGF - 1)*VEGF/(K_Endothelial_VEGF + VEGF))*(1 + (M_Endothelial_influx_TNFa - 1)*TNFa/(K_Endothelial_TNFa + TNFa))*(1 + (M_Endothelial_influx_IL6 - 1)*IL6/(K_Endothelial_IL6 + IL6))*(1 + (M_Endothelial_influx_IL17 - 1)*IL17/(K_Endothelial_IL17 + IL17))*(1 + (M_Endothelial_influx_TGFb - 1)*TGFb/(K_Endothelial_TGFb + TGFb));
  Endothelial_prolif: => Endothelial; kprolif_Endothelial*Endothelial*(1 + (M_Endothelial_prolif_VEGF - 1)*VEGF/(K_Endothelial_VEGF + VEGF))*(1 + (M_Endothelial_prolif_IL1b - 1)*IL1b/(K_Endothelial_IL1b + IL1b));
  Endothelial_death: Endothelial => ; kd_Endo_Baseline*Endothelial*(1 + (M_Endothelial_apop_TNFa - 1)*TNFa/(K_Endothelial_TNFa + TNFa))*(1 + (M_Endothelial_apop_VEGF - 1)*VEGF/(K_Endothelial_VEGF + VEGF));
  FLS_prolif: => FLS; kprolif_FLS*FLS*(1 + (M_FLS_prolif_TNFa - 1)*TNFa/(K_FLS_TNFa + TNFa))*(1 + (M_FLS_prolif_IL6 - 1)*IL6/(K_FLS_IL6 + IL6))*(1 + (M_FLS_prolif_IL1b - 1)*IL1b/(K_FLS_IL1b + IL1b))*(1 + (M_FLS_prolif_IL17 - 1)*IL17/(K_FLS_IL17 + IL17))*(1 + (M_FLS_prolif_TGFb - 1)*TGFb/(K_FLS_TGFb + TGFb));
  FLS_death: FLS => ; kd_FLS_Baseline*FLS*1;
  Macrophages_prolif: => Macrophages; kprolif_Macrophages*Macrophages*(1 + (M_Macrophages_prolif_TNFa - 1)*TNFa/(K_Macrophages_TNFa + TNFa));
  Macrophages_death: Macrophages => ; kd_Macrophase_Baseline*Macrophages*(1 + (M_Macrophages_apop_TNFa - 1)*TNFa/(K_Macrophages_TNFa + TNFa));
  PlasmaCells_prolif: => PlasmaCells; kprolif_PlasmaCells*PlasmaCells*1;
  PlasmaCells_death: PlasmaCells => ; kd_PlasmaCells_Baseline*PlasmaCells*1;
  Th1_influx: => Th1; kIn_Th1_Baseline*1;
  Th1_prolif: => Th1; kprolif_Th1*Th1*(1 + (M_Th1_prolif_IL12 - 1)*IL12/(K_Th1_IL12 + IL12))*(1 + (M_Th1_prolif_TGFb - 1)*TGFb/(K_Th1_TGFb + TGFb));
  Th1_death: Th1 => ; kd_Th1_Baseline*Th1*(1 + (M_Th1_apop_IL12 - 1)*IL12/(K_Th1_IL12 + IL12));
  Th17_influx: => Th17; kIn_Th17_Baseline*1;
  Th17_prolif: => Th17; kprolif_Th17*Th17*(1 + (M_Th17_prolif_IL1b - 1)*IL1b/(K_Th17_IL1b + IL1b))*(1 + (M_Th17_prolif_IL6 - 1)*IL6/(K_Th17_IL6 + IL6))*(1 + (M_Th17_prolif_IL23 - 1)*IL23/(K_Th17_IL23 + IL23));
  Th17_death: Th17 => ; kd_Th17_Baseline*Th17*1;
  Treg_influx: => Treg; kIn_Treg_Baseline*1;
  Treg_prolif: => Treg; kprolif_Treg*Treg*(1 + (M_Treg_prolif_IL6 - 1)*IL6/(K_Treg_IL6 + IL6))*(1 + (M_Treg_prolif_TGFb - 1)*TGFb/(K_Treg_TGFb + TGFb))*(1 + (M_Treg_prolif_IFNg - 1)*IFNg/(K_Treg_IFNg + IFNg));
  Treg_death: Treg => ; kd_Treg_Baseline*Treg*1;
end
